<Node name="root" dt="1e-3" gravity="0 0 0">

    <RequiredPlugin pluginName='SofaGeneralEngine'/>
    <RequiredPlugin pluginName='SofaImplicitOdeSolver'/>
    <RequiredPlugin pluginName='SofaBoundaryCondition'/>
    <RequiredPlugin pluginName="ROS2Plugin"/>

    <RequiredPlugin pluginName="ConectPlugin" />
    <RequiredPlugin pluginName="RegistrationConstraint" />
    <RequiredPlugin pluginName="CollisionAlgorithm" />
    <RequiredPlugin pluginName="SperryPlugin" />

    <ROS2Context name="ros2Context"/>

    <EulerImplicitSolver name="ODEsolver" rayleighStiffness="0.1" rayleighMass="0.1"/>
    <CGLinearSolver iterations="100" tolerance="1e-5" threshold="1e-5"/>

    <!-- Listen to a marker pose to be published -->
    <ROS2SubscriberArray name="pose_sub"
                    template="RosPoseArray"
                    initialValue="0 0 0 0 0 0 1"
                    indexes="0"
                    nodeName="pose_subscriber"
                    topicName="/optitrack/rigid_bodies/poses"
                    draw="false"/>
    <Node name="MarkerPose">
        <MechanicalObject name="DOFs" template="Rigid3d" showObject="true" showObjectScale="0.01"/>
        <EngineToTopology name="EngineToTopology" template="Rigid3d" state="@DOFs" position="@../pose_sub.output" listening="true"/>
    </Node>

    <TransformEngine name="TranslationEngine" template="Rigid3d" input_position="@MarkerPose/DOFs.position"
                     translation="0.0 0.0 0.10" rotation="0.0 0.0 0.0"/>

    <Node name="FollowPose">
<!--        Draw not working anymore!!! (SOFA.GL bug ?)     -->
        <MechanicalObject name="DOFs" template="Rigid3d" showObject="false" showObjectScale="0.01"
                          position="@../TranslationEngine.output_position"/>
    </Node>

    <!-- Publish a translated version of this pose -->
    <ROS2Publisher name="pose_pub"
                   template="RosPoseArray"
                   nodeName="pose_publisher"
                   topicName="sofa/out/marker_pose"
                   input="@TranslationEngine.output_position"
                   draw="false"/>
</Node>
